θ := 10
θ := θ*π/180
φ := 30
φ := φ*π/180
θ := 0 .. π  # disabled
φ := 0 .. 2*π  # disabled
# Opredelenie napravlenii oblycheniya i priema i polyarizacii
CP(θ) := cos(θ)
CF(φ) := cos(φ)
SP(θ) := sin(θ)
SF(φ) := sin(φ)
R0(θ, φ) := [CP(θ); -SP(θ)*SF(φ); -SP(θ)*CF(φ)]
RR(θ, φ) := [-CP(θ); SP(θ)*SF(φ); SP(θ)*CF(φ)]
φ_nab := 100
φ_nab := φ_nab*π/180
φ_nab := 0 .. 20*deg  # disabled
CFG(φ, φ_nab) := cos(φ + φ_nab)
SFG(φ, φ_nab) := sin(φ + φ_nab)
R1(θ, φ, φ_nab) := [-CP(θ); SP(θ)*SFG(φ, φ_nab); SP(θ)*CFG(φ, φ_nab)]
P0(φ) := [0; CF(φ); -SF(φ)]
P1(φ, φ_nab) := [0; -CFG(φ, φ_nab); -SFG(φ, φ_nab)]
PK0(θ, φ) := [SP(θ); CP(θ)*SF(φ); CP(θ)*CF(φ)]
PK1(θ, φ, φ_nab) := [-SP(θ); -CP(θ)*SFG(φ, φ_nab); -CP(θ)*CFG(φ, φ_nab)]
λ := 0.3
k := 2*π/λ
x_1 := -1
y_1 := 0
z_1 := 10
x_2 := 10
y_2 := -1
z_2 := 0
x_3 := 0
y_3 := 0
z_3 := -1
Z1 := [x_1; y_1; z_1]
Z2 := [x_2; y_2; z_2]
Z3 := [x_3; y_3; z_3]
Z[1, 1] := x_1
Z[1, 2] := y_1
Z[1, 3] := z_1
Z[2, 1] := x_2
Z[2, 2] := y_2
Z[2, 3] := z_2
Z[3, 1] := x_3
Z[3, 2] := y_3
Z[3, 3] := z_3
ad := 10^-3
dd := |(Z2 - Z1)×(Z3 - Z1)|
dd := 0.5*dd  # disabled
dd = 111.548
DR0(θ, φ, φ_nab) := R0(θ, φ) + R1(θ, φ, φ_nab)
DR1 := Z2 - Z3
DR2 := Z1 - Z3
a1(θ, φ, φ_nab) := sum(transpose(DR0(θ, φ, φ_nab))[:, m]*transpose(DR1)[:, m], m = 0 .. 2)
a2(θ, φ, φ_nab) := sum(transpose(DR0(θ, φ, φ_nab))[:, m]*transpose(DR2)[:, m], m = 0 .. 2)
a1(θ, φ, φ_nab) := -a1(θ, φ, φ_nab)/k
a1(θ, φ, φ_nab) = 0.0147155
a2(θ, φ, φ_nab) := -a2(θ, φ, φ_nab)/k
a2(θ, φ, φ_nab) = 0.137607
n0_1 := (Z2 - Z1)×(Z3 - Z1)/|(Z2 - Z1)×(Z3 - Z1)|
n0_2 := (Z1 - Z2)×(Z3 - Z2)/|(Z1 - Z2)×(Z3 - Z2)|
n0_3 := (Z1 - Z3)×(Z2 - Z3)/|(Z1 - Z3)×(Z2 - Z3)|
tes(θ, φ) := 3*sum(transpose(RR(θ, φ))[:, m]*transpose(n0_1)[:, m], m = 0 .. 2)
n0_1 := if(tes(θ, φ) > 0, neg(□, n0_1), n0_1)
n0_2 := if(tes(θ, φ) > 0, -n0_2, n0_2)
n0_3 := if(tes(θ, φ) > 0, -n0_3, n0_3)
n := n0_1
tes(θ, φ) := sum(transpose(P0(φ))[:, m]*transpose(n)[:, m], m = 0 .. 2)
tes(θ, φ) = 0.857287
P0t(θ, φ) := P0(φ) - n*tes(θ, φ)
tes(θ, φ) := sum(transpose(RR(θ, φ))[:, m]*transpose(n)[:, m], m = 0 .. 2)
tes(θ, φ) = -0.0093684
tes2(θ, φ) := if(|tes(θ, φ)| > 0.001, tes(θ, φ), 0)
tol := 0
m1 := 1
e1 := 1
c0(θ, φ) := sqrt(1 - (1 - tes2(θ, φ)^2)/(e1*m1))
c2(θ, φ) := c0(θ, φ)
c1(θ, φ) := k*tol*c0(θ, φ)*sqrt(m1*e1)
c(θ, φ) := sqrt(m1/e1)*c0(θ, φ)*sin(c1(θ, φ))/cos(c1(θ, φ))
c0(θ, φ) := 2*tes2(θ, φ)
c1(θ, φ) := (1i*c0(θ, φ) - 1)/(1i*c0(θ, φ) + 1)
R0p(θ, φ) := n×RR(θ, φ)
R0t(θ, φ) := RR(θ, φ) - (n*tes2(θ, φ))
P1t(θ, φ) := if(tol == 0, c1(θ, φ)*P0t(θ, φ) + 0 + R0p(θ, φ)*sum(transpose(R0p(θ, φ))[:, m]*transpose(P0(φ))[:, m], m = 0 .. 2)/(e1/m1*(1i*c(θ, φ) + c2(θ, φ)^2/tes2(θ, φ))), c1(θ, φ)*P0t(θ, φ) + 1i*2*c(θ, φ)/(1i*c0(θ, φ) + 1)*R0t(θ, φ)*sum(transpose(R0t(θ, φ))[:, m]*transpose(P0(φ))[:, m], m = 0 .. 2)/(1i*c(θ, φ)*tes2(θ, φ)) + R0p(θ, φ)*sum(transpose(R0p(θ, φ))[:, m]*transpose(P0(φ))[:, m], m = 0 .. 2)/(e1/m1*(1i*c(θ, φ) + c2(θ, φ)^2/tes2(θ, φ))))
tes5(θ, φ) := sum(transpose(RR(θ, φ))[:, m]*transpose(P1t(θ, φ))[:, m], m = 0 .. 2)
Pr1(θ, φ) := P1t(θ, φ) + n*tes5(θ, φ)/tes(θ, φ)
RR1(θ, φ) := RR(θ, φ) - 2*n*tes(θ, φ)
Et(φ) := n×P0(φ)
cn := n + 1i
Et(θ, φ) := Et(φ) + (cn×Pr1(θ, φ))
Et(θ, φ) = [54.072 + 55.3098i; -5.26983 - 46.4838i; -8.29264 - 8.81211i]
tes(θ, φ) := sum(transpose(RR(θ, φ))[:, m]*transpose(n)[:, m], m = 0 .. 2)
Ht(θ, φ) := P0(φ)*tes(θ, φ) - RR(θ, φ)*sum(transpose(P0(φ))[:, m]*transpose(n)[:, m], m = 0 .. 2)
Ht(θ, φ) = [0.844263; -0.0825464; -0.124238]
# Vichiclenie integrala po trem tochkam
________________________________________________________________________________________
tes(θ, φ) := sum(transpose(RR1(θ, φ))[:, m]*transpose(n)[:, m], m = 0 .. 2)
tes(θ, φ) = 0.0093684
cdr3(θ, φ) := Pr1(θ, φ)*tes(θ, φ)
tes5(θ, φ) := sum(transpose(Pr1(θ, φ))[:, m]*transpose(n)[:, m], m = 0 .. 2)
tes5(θ, φ) = 0.856685 + 0.0321143i
cdr3(θ, φ) := cdr3(θ, φ) - RR1(θ, φ)*tes5(θ, φ)
cdr3(θ, φ) = [0.9203 + 0.0316265i; -0.0946666 - 0.00309223i; 0.384699 - 0.004654i]
tes(θ, φ) := sum(transpose(RR1(θ, φ))[:, m]*transpose(Z3)[:, m], m = 0 .. 2)
tes(θ, φ) = -0.150552
Ht(θ, φ) := Ht(θ, φ) + cdr3(θ, φ)
Ht(θ, φ) = [1.76456 + 0.0316265i; -0.177213 - 0.00309223i; 0.260461 - 0.004654i]
c - (-(-(-(-(-(-(-(-(-(-(-(-(-(-(-(-(-(-(-(-(-(-(-(-(-(-(-(-(-(-(-(-(-(-(-(-(-(-(-(-(-(-(-(-(-(-(-(-(-(-(-(-(-(-(-(-□))))))))))))))))))))))))))))))))))))))))))))))))))))))))
a(θ, φ, φ_nab) := sum(transpose(Et(θ, φ))[:, m]*transpose(P1(φ, φ_nab)×R1(θ, φ, φ_nab))[:, m], m = 0 .. 2)
a(θ, φ, φ_nab) = -7.59455 - 38.9782i
tes(θ, φ, φ_nab) := sum(transpose(P1(φ, φ_nab))[:, m]*transpose(R1(θ, φ, φ_nab))[:, m], m = 0 .. 2)
tes(θ, φ, φ_nab) = 0.17101
dr3(θ, φ, φ_nab) := R1(θ, φ, φ_nab)*tes(θ, φ, φ_nab)
dr3(θ, φ, φ_nab) := P1(φ, φ_nab) - dr3(θ, φ, φ_nab)
dr3(θ, φ, φ_nab) = [0.168412; 0.620039; -0.746956]
a(θ, φ, φ_nab) := a(θ, φ, φ_nab) + sum(transpose(Ht(θ, φ))[:, m]*transpose(dr3(θ, φ, φ_nab))[:, m], m = 0 .. 2)
a(θ, φ, φ_nab) = -7.60181 - 38.9713i
f(θ, φ, φ_nab) := [a(θ, φ, φ_nab); a(θ, φ, φ_nab); a(θ, φ, φ_nab)]
f(θ, φ, φ_nab) = [-7.60181 - 38.9713i; -7.60181 - 38.9713i; -7.60181 - 38.9713i]
Bi0 := [1/6; 1/6; 1/2]
Bi0 = [0.166667; 0.166667; 0.5]
Bi1 := [
    -0.5*(-1/a1(θ, φ, φ_nab)^2 - 1/(a1(θ, φ, φ_nab) - 1i)/a1(θ, φ, φ_nab) + (round(1/a1(θ, φ, φ_nab)^2) + (1/(a1(θ, φ, φ_nab) - 1i))^2)*(e^(1i*a1(θ, φ, φ_nab)) - 1)/(1i*a1(θ, φ, φ_nab)));
    1/6;
    ((1 - 1i*a1(θ, φ, φ_nab))*e^(1i*a1(θ, φ, φ_nab)) - 1)/a1(θ, φ, φ_nab)^2
]
Bi1 = [1.06108 + 16.9706i; 0.166667; 0.499973 + 0.00490506i]
Bi2 := [
    -((e^(1i*a2(θ, φ, φ_nab)) - 1)/(1i*a2(θ, φ, φ_nab)) - 1 - 1i/2*a2(θ, φ, φ_nab))/a2(θ, φ, φ_nab)^2;
    -(1 - (e^(1i*a2(θ, φ, φ_nab)) - 1)/(1i*a2(θ, φ, φ_nab)) + (-(1i*a2(θ, φ, φ_nab)*e^(1i*a2(θ, φ, φ_nab)) - e^(1i*a2(θ, φ, φ_nab)) + 1)/(1i*a2(θ, φ, φ_nab))))/a2(θ, φ, φ_nab)^2;
    ((e^(1i*a2(θ, φ, φ_nab)) - 1)/(1i*a2(θ, φ, φ_nab)) - 1)/(1i*a2(θ, φ, φ_nab))
]
Bi2 = [0.166509 + 0.00573i; -0.499212 + 7.24417i; 0.499212 + 0.0229128i]
Bi3 := [
    -(1 - (e^(1i*a1(θ, φ, φ_nab)) - 1)/(1i*a1(θ, φ, φ_nab)) + (1i*a1(θ, φ, φ_nab)*e^(1i*a1(θ, φ, φ_nab)) - e^(1i*a1(θ, φ, φ_nab)) + 1)/(1i*a1(θ, φ, φ_nab)))/a1(θ, φ, φ_nab)^2;
    -((e^(1i*a1(θ, φ, φ_nab)) - 1)/(1i*a1(θ, φ, φ_nab)) - 1 - 1i/2*a1(θ, φ, φ_nab))/a1(θ, φ, φ_nab)^2;
    (e^(1i*a1(θ, φ, φ_nab)) - 1)/(1i*a1(θ, φ, φ_nab) - 1)/(1i*a1(θ, φ, φ_nab))
]
Bi3 = [0.166661 + 0.00122627i; 0.166665 + 0.000613142i; -0.999639 - 0.0220678i]
Bi4 := [
    -((e^(1i*a2(θ, φ, φ_nab)) - 1)/(1i*a2(θ, φ, φ_nab)) - (e^(1i*a1(θ, φ, φ_nab)) - 1)/(1i*a1(θ, φ, φ_nab)) - (a2(θ, φ, φ_nab) - a1(θ, φ, φ_nab))*(1i*a1(θ, φ, φ_nab)*e^(1i*a1(θ, φ, φ_nab)) - e^(1i*a1(θ, φ, φ_nab)) + 1)/(1i*a1(θ, φ, φ_nab)^2))/(a2(θ, φ, φ_nab) - a1(θ, φ, φ_nab))^2;
    -((e^(1i*a1(θ, φ, φ_nab)) - 1)/(1i*a1(θ, φ, φ_nab)) - (e^(1i*a2(θ, φ, φ_nab)) - 1)/(1i*a2(θ, φ, φ_nab)) - (a1(θ, φ, φ_nab) - a2(θ, φ, φ_nab))*(1i*a2(θ, φ, φ_nab)*e^(1i*a2(θ, φ, φ_nab)) - e^(1i*a2(θ, φ, φ_nab)) + 1)/(1i*a2(θ, φ, φ_nab)^2))/(a2(θ, φ, φ_nab) - a1(θ, φ, φ_nab))^2;
    ((e^(1i*a2(θ, φ, φ_nab)) - 1)/(1i*a2(θ, φ, φ_nab)) - (e^(1i*a1(θ, φ, φ_nab)) - 1)/(1i*a1(θ, φ, φ_nab)))/(1i*(a2(θ, φ, φ_nab) - a1(θ, φ, φ_nab)))
]
Bi4 = [0.16647 + 0.00695537i; 0.166158 + 0.0120647i; 0.499118 + 0.0253627i]
Bi := if(|a1(θ, φ, φ_nab)| < ad and |a2(θ, φ, φ_nab)| < ad, Bi0, Bi1)
Bi := if(|a1(θ, φ, φ_nab)| ≥ ad and |a2(θ, φ, φ_nab)| ≥ ad, Bi, Bi2)
Bi := if(|a1(θ, φ, φ_nab)| < ad and |a2(θ, φ, φ_nab)| ≥ ad, Bi, Bi3)
Bi := if(|a2(θ, φ, φ_nab)| < ad and |a1(θ, φ, φ_nab)| ≥ ad, Bi, Bi4)
Bi = [0.16647 + 0.00695537i; 0.166158 + 0.0120647i; 0.499118 + 0.0253627i]
tes(θ, φ, φ_nab) := sum(transpose(R1(θ, φ, φ_nab))[:, m] + transpose(RR(θ, φ))[:, m]*transpose(Z3)[:, m], m = 0 .. 2)
tes(θ, φ, φ_nab) = [-1.11379]
ep := e^(-1i*k*tes(θ, φ, φ_nab))*dd*((transpose(f(θ, φ, φ_nab))[:, 0] - transpose(f(θ, φ, φ_nab))[:, 1])*transpose(Bi)[:, 2] + (transpose(f(θ, φ, φ_nab))[:, 1] - transpose(f(θ, φ, φ_nab))[:, 2])*transpose(Bi)[:, 0] + transpose(f(θ, φ, φ_nab))[:, 2]*transpose(Bi)[:, 2])
ep = [-2058.31 + 814.227i]
-0.111 - 1.017i
